# OpenSim document version 40600
Model KineticLens_185cm_93kg_ESTIMATED_GRF:
  gravity: 0 -9.80665 0
  length_units: meters
  force_units: N
  credits:
    Rajagopal et al. (2016), Lai et al. (2017), Uhlrich et al. (2022). Notes: P. van den Bos changed the fiber-damping from 0.01 to default of 0.1 as suggested in M. Millard (2013) "Flexing Computational Muscle: Modeling and Simulation of Musculotendon Dynamics".
  publications:
    [1] Rajagopal, A., Dembia, C.L., DeMers, M.S., Delp, D.D., Hicks, J.L., Delp, S.L. (2016) Full-body musculoskeletal model for muscle-driven simulation of human gait. IEEE Transactions on Biomedical Engineering. [2] Lai, A.K.M., Arnold, A.S., Wakeling, J.M. (2017) Why are antagonist muscles co-activated in my simulation? A musculoskeletal model for analysing human locomotor tasks. Annals of Biomedical Engineering. [3] Uhlrich, S.D., Jackson, R.W., Seth, A., Kolesar, J.A., Delp, S.L. (2022) Muscle coordination retraining inspired by musculoskeletal simulations reduces knee contact force. Scientific Reports.
  Ground
  BodySet:
    Body pelvis: mass=14.53816 [kg] mass_center=(-0.07474 0 0) inertia=(0.1418192 0.1201601 0.07987678 0 0 0)
        meshes=(r_pelvis.vtp l_pelvis.vtp sacrum.vtp)
      WrapCylinder Gmax1_at_pelvis_r: xyz_body_rotation=(-0.6 0.45 0) translation=(-0.0814 -0.1046571 0.06448571)
          quadrant=-x radius=0.04228571 length=0.1585714
      WrapCylinder Gmax2_at_pelvis_r: xyz_body_rotation=(-0.75 0.39 0) translation=(-0.08457143 -0.08774286 0.07188571)
          quadrant=all radius=0.04228571 length=0.1057143
      WrapCylinder Gmax3_at_pelvis_r: xyz_body_rotation=(-0.1 0 0) translation=(-0.08774286 -0.09302857 0.07188571)
          quadrant=all radius=0.04228571 length=0.1057143
      WrapCylinder Gmax1_at_pelvis_l: xyz_body_rotation=(0.6 -0.45 0) translation=(-0.0814 -0.1046571 -0.06448571)
          quadrant=-x radius=0.04228571 length=0.1585714
      WrapCylinder Gmax2_at_pelvis_l: xyz_body_rotation=(0.75 -0.39 0)
          translation=(-0.08457143 -0.08774286 -0.07188571) quadrant=all radius=0.04228571 length=0.1057143
      WrapCylinder Gmax3_at_pelvis_l: xyz_body_rotation=(0.1 0 0) translation=(-0.08774286 -0.09302857 -0.07188571)
          quadrant=all radius=0.04228571 length=0.1057143
      WrapCylinder PS_at_brim_r: xyz_body_rotation=(-0.25 -0.27 0.1) translation=(-0.07822857 -0.06342857 0.06934857)
          quadrant=-y radius=0.05285714 length=0.1057143
      WrapCylinder PS_at_brim_l: xyz_body_rotation=(0.25 0.27 0.1) translation=(-0.07822857 -0.06342857 -0.06934857)
          quadrant=-y radius=0.05285714 length=0.1057143
      WrapCylinder IL_at_brim_r: xyz_body_rotation=(-0.32 -0.24 0.9) translation=(-0.07505714 -0.06871429 0.07992)
          quadrant=-y radius=0.05803714 length=0.1057143
      WrapCylinder IL_at_brim_l: xyz_body_rotation=(0.32 0.24 0.9) translation=(-0.07505714 -0.06871429 -0.07992)
          quadrant=-y radius=0.05803714 length=0.1057143
    Body femur_r: mass=11.48214 mass_center=(0 -0.1797143 0) inertia=(0.1847237 0.04842271 0.1947945 0 0 0)
        meshes=r_femur.vtp
      WrapCylinder GasLat_at_condyles_r: translation=(0.005285714 -0.4334286 0) quadrant=all radius=0.02748571
          length=0.1057143
      WrapCylinder GasMed_at_condyles_r: translation=(0.005285714 -0.4334286 0) quadrant=all radius=0.02642857
          length=0.1057143
      WrapCylinder KnExt_at_fem_r: xyz_body_rotation=(-0.0623366 0.0507601 0)
          translation=(0.003793325 -0.4257453 0.002210602) quadrant=all radius=0.02642857 length=0.1057143
      WrapCylinder KnExtVL_at_fem_r: xyz_body_rotation=(-0.0623366 0.0507601 0)
          translation=(0.001996182 -0.4257453 0.002210602) quadrant=all radius=0.02642857 length=0.1057143
      WrapCylinder AB_at_femshaft_r: xyz_body_rotation=(1.66157 0.186644 0)
          translation=(0.01548017 -0.119029 0.02470014) quadrant=all radius=0.01744286 length=0.074
      WrapCylinder AL_at_femshaft_r: xyz_body_rotation=(1.77711 0.136489 0)
          translation=(0.03248885 -0.2451609 0.01597734) quadrant=all radius=0.02124857 length=0.1057143
      WrapCylinder AMprox_at_femshaft_r: xyz_body_rotation=(1.61126 0.18656 0)
          translation=(0.005479161 -0.07706022 0.0268546) quadrant=all radius=0.02230571 length=0.074
      WrapCylinder AMmid_at_femshaft_r: xyz_body_rotation=(1.61139 0.13656 0)
          translation=(0.0243275 -0.1698945 0.02176044) quadrant=all radius=0.02262286 length=0.1268571
      WrapCylinder AMdist_at_femshaft_r: xyz_body_rotation=(1.71188 0.186636 0)
          translation=(0.03341259 -0.2756352 0.00989972) quadrant=all radius=0.02304571 length=0.2114286
      WrapCylinder AMisch_at_condyles_r: xyz_body_rotation=(1.71115 -0.463363 0)
          translation=(-0.02394545 -0.3983642 -0.00333462) quadrant=all radius=0.04228571 length=0.2537143
      WrapCylinder PECT_at_femshaft_r: xyz_body_rotation=(1.81295 0.276344 0)
          translation=(0.006433486 -0.08933164 0.03217996) quadrant=all radius=0.01585714 length=0.05285714
    Body tibia_r: mass=4.576735 mass_center=(0 -0.1973686 0) inertia=(0.06953005 0.007035779 0.07049574 0 0 0)
        meshes=(r_tibia.vtp r_fibula.vtp)
      WrapCylinder GasLat_at_shank_r: xyz_body_rotation=(2.96723 -0.279725 -1.47812)
          translation=(-0.007822857 -0.07822857 -0.003488571) quadrant=-y radius=0.05814286 length=0.1057143
      WrapCylinder GasMed_at_shank_r: xyz_body_rotation=(2.96723 0.0279725 -1.47812)
          translation=(-0.007822857 -0.07822857 -0.003488571) quadrant=-y radius=0.06237143 length=0.1057143
      WrapCylinder GR_at_condyles_r: xyz_body_rotation=(0 -0.4 0) translation=(-0.003171429 -0.02114286 0) quadrant=all
          radius=0.03805714 length=0.1057143
      WrapCylinder SM_at_condyles_r: xyz_body_rotation=(0 -0.1 0) translation=(-0.001057143 -0.02114286 0) quadrant=all
          radius=0.03647143 length=0.1057143
      WrapCylinder ST_at_condyles_r: xyz_body_rotation=(0 -0.2 0) translation=(-0.002114286 -0.02167143 0) quadrant=all
          radius=0.04492857 length=0.1057143
      WrapCylinder BF_at_gastroc_r: translation=(-0.04122857 -0.06342857 0) quadrant=y radius=0.03065714
          length=0.1585714
    Body patella_r: mass=0.1064099 mass_center=(0.001902857 0.02790857 0)
        inertia=(3.95935e-6 1.808609e-5 1.808609e-5 0 0 0) meshes=r_patella.vtp
    Body talus_r: mass=0.1234453 mass_center=(0 0 0) inertia=(0.001379564 0.001379564 0.001379564 0 0 0)
        meshes=r_talus.vtp
    Body calcn_r: mass=1.543066 mass_center=(0.1057143 0.03171429 0) inertia=(0.00193139 0.005380301 0.005656214 0 0 0)
        meshes=r_foot.vtp
    Body toes_r: mass=0.2673826 mass_center=(0.03657714 0.006342857 -0.0185)
        inertia=(0.0001379564 0.001517521 0.001379564 0 0 0) meshes=r_bofoot.vtp
    Body femur_l: mass=11.48214 mass_center=(0 -0.1797143 0) inertia=(0.1847237 0.04842271 0.1947945 0 0 0)
        meshes=l_femur.vtp
      WrapCylinder GasLat_at_condyles_l: translation=(0.005285714 -0.4334286 0) quadrant=all radius=0.02748571
          length=0.1057143
      WrapCylinder GasMed_at_condyles_l: translation=(0.005285714 -0.4334286 0) quadrant=all radius=0.02642857
          length=0.1057143
      WrapCylinder KnExt_at_fem_l: xyz_body_rotation=(0.0623366 -0.0507601 0)
          translation=(0.003793325 -0.4257453 -0.002210602) quadrant=all radius=0.02642857 length=0.1057143
      WrapCylinder KnExtVL_at_fem_l: xyz_body_rotation=(0.0623366 -0.0507601 0)
          translation=(0.001996182 -0.4257453 -0.002210602) quadrant=all radius=0.02642857 length=0.1057143
      WrapCylinder AB_at_femshaft_l: xyz_body_rotation=(-1.66157 -0.186644 0)
          translation=(0.01548017 -0.119029 -0.02470014) quadrant=all radius=0.01744286 length=0.074
      WrapCylinder AL_at_femshaft_l: xyz_body_rotation=(-1.77711 -0.136489 0)
          translation=(0.03248885 -0.2451609 -0.01597734) quadrant=all radius=0.02124857 length=0.1057143
      WrapCylinder AMprox_at_femshaft_l: xyz_body_rotation=(-1.61126 -0.18656 0)
          translation=(0.005479161 -0.07706022 -0.0268546) quadrant=all radius=0.02230571 length=0.074
      WrapCylinder AMmid_at_femshaft_l: xyz_body_rotation=(-1.61139 -0.13656 0)
          translation=(0.0243275 -0.1698945 -0.02176044) quadrant=all radius=0.02262286 length=0.1268571
      WrapCylinder AMdist_at_femshaft_l: xyz_body_rotation=(-1.71188 -0.186636 0)
          translation=(0.03341259 -0.2756352 -0.00989972) quadrant=all radius=0.02304571 length=0.2114286
      WrapCylinder AMisch_at_condyles_l: xyz_body_rotation=(-1.71115 0.463363 0)
          translation=(-0.02394545 -0.3983642 0.00333462) quadrant=all radius=0.04228571 length=0.2537143
      WrapCylinder PECT_at_femshaft_l: xyz_body_rotation=(-1.81295 -0.276344 0)
          translation=(0.006433486 -0.08933164 -0.03217996) quadrant=all radius=0.01585714 length=0.05285714
    Body tibia_l: mass=4.576735 mass_center=(0 -0.1973686 0) inertia=(0.06953005 0.007035779 0.07049574 0 0 0)
        meshes=(l_tibia.vtp l_fibula.vtp)
      WrapCylinder GasLat_at_shank_l: xyz_body_rotation=(-2.96723 0.279725 -1.47812)
          translation=(-0.007822857 -0.07822857 0.003488571) quadrant=-y radius=0.05814286 length=0.1057143
      WrapCylinder GasMed_at_shank_l: xyz_body_rotation=(-2.96723 -0.0279725 -1.47812)
          translation=(-0.007822857 -0.07822857 0.003488571) quadrant=-y radius=0.06237143 length=0.1057143
      WrapCylinder GR_at_condyles_l: xyz_body_rotation=(0 0.4 0) translation=(-0.003171429 -0.02114286 0) quadrant=all
          radius=0.03805714 length=0.1057143
      WrapCylinder SM_at_condyles_l: xyz_body_rotation=(0 0.1 0) translation=(-0.001057143 -0.02114286 0) quadrant=all
          radius=0.03647143 length=0.1057143
      WrapCylinder ST_at_condyles_l: xyz_body_rotation=(0 0.2 0) translation=(-0.002114286 -0.02167143 0) quadrant=all
          radius=0.04492857 length=0.1057143
      WrapCylinder BF_at_gastroc_l: translation=(-0.04122857 -0.06342857 0) quadrant=all radius=0.03065714
          length=0.1585714
    Body patella_l: mass=0.1064099 mass_center=(0.001902857 0.02790857 0)
        inertia=(3.95935e-6 1.808609e-5 1.808609e-5 0 0 0) meshes=l_patella.vtp
    Body talus_l: mass=0.1234453 mass_center=(0 0 0) inertia=(0.001379564 0.001379564 0.001379564 0 0 0)
        meshes=l_talus.vtp
    Body calcn_l: mass=1.543066 mass_center=(0.1057143 0.03171429 0) inertia=(0.00193139 0.005380301 0.005656214 0 0 0)
        meshes=l_foot.vtp
    Body toes_l: mass=0.2673826 mass_center=(0.03657714 0.006342857 0.0185)
        inertia=(0.0001379564 0.001517521 0.001379564 0 0 0) meshes=l_bofoot.vtp
    Body torso: mass=33.11618 mass_center=(-0.03171429 0.3382857 0) inertia=(2.034168 1.042261 1.974709 0 0 0)
        meshes=(hat_spine.vtp hat_jaw.vtp hat_skull.vtp hat_ribs_scap.vtp)
    Body humerus_r: mass=2.509026 mass_center=(0 -0.1739021 0) inertia=(0.01648028 0.005685185 0.01849858 0 0 0)
        meshes=humerus_rv.vtp
    Body ulna_r: mass=0.7499303 mass_center=(0 -0.1274121 0) inertia=(0.00408627 0.0008525708 0.00443254 0 0 0)
        meshes=ulna_rv.vtp
    Body radius_r: mass=0.7499303 mass_center=(0 -0.1274121 0) inertia=(0.00408627 0.0008525708 0.00443254 0 0 0)
        meshes=radius_rv.vtp
    Body hand_r: mass=0.5647623 mass_center=(0 -0.07198614 0) inertia=(0.001230571 0.0007546217 0.001848616 0 0 0)
        meshes=(pisiform_rvs.vtp lunate_rvs.vtp scaphoid_rvs.vtp triquetrum_rvs.vtp hamate_rvs.vtp capitate_rvs.vtp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)
    Body humerus_l: mass=2.509026 mass_center=(0 -0.1739021 0) inertia=(0.01648028 0.005685185 0.01849858 0 0 0)
        meshes=humerus_lv.vtp
    Body ulna_l: mass=0.7499303 mass_center=(0 -0.1274121 0) inertia=(0.00408627 0.0008525708 0.00443254 0 0 0)
        meshes=ulna_lv.vtp
    Body radius_l: mass=0.7499303 mass_center=(0 -0.1274121 0) inertia=(0.00408627 0.0008525708 0.00443254 0 0 0)
        meshes=radius_lv.vtp
    Body hand_l: mass=0.5647623 mass_center=(0 -0.07198614 0) inertia=(0.001230571 0.0007546217 0.001848616 0 0 0)
        meshes=(pisiform_lvs.vtp lunate_lvs.vtp scaphoid_lvs.vtp triquetrum_lvs.vtp hamate_lvs.vtp capitate_lvs.vtp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)
  JointSet:
    CustomJoint ground_pelvis: socket_parent_frame=ground_offset socket_child_frame=pelvis_offset
      Coordinate pelvis_tilt: default_value=0 range=(-1.570796 1.570796) clamped=true
      Coordinate pelvis_list: default_value=0 range=(-1.570796 1.570796) clamped=true
      Coordinate pelvis_rotation: default_value=0 range=(-1.570796 1.570796) clamped=true
      Coordinate pelvis_tx: default_value=0 range=(-5 5) clamped=true
      Coordinate pelvis_ty: default_value=0.94 range=(-1 2) clamped=true
      Coordinate pelvis_tz: default_value=0 range=(-3 3) clamped=true
      PhysicalOffsetFrame ground_offset: socket_parent=/ground translation=(0 0 0) [meters]
      PhysicalOffsetFrame pelvis_offset: socket_parent=/bodyset/pelvis translation=(0 0 0)
      SpatialTransform:
        TransformAxis rotation1: coordinates=pelvis_tilt axis=(0 0 1) LinearFunction(coefficients=1 0)
        TransformAxis rotation2: coordinates=pelvis_list axis=(1 0 0) LinearFunction(coefficients=1 0)
        TransformAxis rotation3: coordinates=pelvis_rotation axis=(0 1 0) LinearFunction(coefficients=1 0)
        TransformAxis translation1: coordinates=pelvis_tx axis=(1 0 0) LinearFunction(coefficients=1 0)
        TransformAxis translation2: coordinates=pelvis_ty axis=(0 1 0) LinearFunction(coefficients=1 0)
        TransformAxis translation3: coordinates=pelvis_tz axis=(0 0 1) LinearFunction(coefficients=1 0)
    CustomJoint hip_r: socket_parent_frame=pelvis_offset socket_child_frame=femur_r_offset
      Coordinate hip_flexion_r: default_value=0 range=(-0.5235988 2.094395) clamped=true
      Coordinate hip_adduction_r: default_value=0 range=(-0.8726646 0.5235988) clamped=true
      Coordinate hip_rotation_r: default_value=0 range=(-0.6981317 0.6981317) clamped=true
      PhysicalOffsetFrame pelvis_offset: socket_parent=/bodyset/pelvis translation=(-0.05949177 -0.08297514 0.08167486)
      PhysicalOffsetFrame femur_r_offset: socket_parent=/bodyset/femur_r translation=(0 0 0)
      SpatialTransform: axes_held_at_zero=(translation1 translation2 translation3)
        TransformAxis rotation1: coordinates=hip_flexion_r axis=(0 0 1) LinearFunction(coefficients=1 0)
        TransformAxis rotation2: coordinates=hip_adduction_r axis=(1 0 0) LinearFunction(coefficients=1 0)
        TransformAxis rotation3: coordinates=hip_rotation_r axis=(0 1 0) LinearFunction(coefficients=1 0)
    CustomJoint walker_knee_r: socket_parent_frame=femur_r_offset socket_child_frame=tibia_r_offset
      Coordinate knee_angle_r: default_value=0 range=(0 2.443461) clamped=true
      PhysicalOffsetFrame femur_r_offset: socket_parent=/bodyset/femur_r translation=(-0.004757143 -0.4330057 -0.00185)
          orientation=(-1.64157 1.44618 1.5708) [radians]
      PhysicalOffsetFrame tibia_r_offset: socket_parent=/bodyset/tibia_r
          translation=(-0.008551799 -0.003736789 -0.001569582) orientation=(-1.64157 1.44618 1.5708)
      SpatialTransform:
        TransformAxis rotation1: coordinates=knee_angle_r axis=(1 0 0) LinearFunction(coefficients=1 0)
        TransformAxis rotation2: coordinates=knee_angle_r axis=(0 0 1)
          PolynomialFunction: coefficients=(0.01083209 -0.02521833 -0.03284781 0.07910001 -1.473252e-8)
        TransformAxis rotation3: coordinates=knee_angle_r axis=(0 1 0)
          PolynomialFunction: coefficients=(0.02516576 -0.1694801 0.3694993 -4.430358e-8)
        TransformAxis translation1: coordinates=knee_angle_r axis=(1 0 0)
          MultiplierFunction: scale=1.057143
            PolynomialFunction: coefficients=(0.0001590448 -0.00101515 0.001817511 2.641427e-5 -7.746564e-7)
        TransformAxis translation2: coordinates=knee_angle_r axis=(0 1 0)
          MultiplierFunction: scale=1.057143
            PolynomialFunction: coefficients=(-0.0005796878 0.005079766 -0.01144238 0.003936909 -2.51635e-5)
        TransformAxis translation3: coordinates=knee_angle_r axis=(0 0 1)
          MultiplierFunction: scale=1.057143
            PolynomialFunction: coefficients=(0.001208087 -0.004453611 0.0006116494 0.00626543 -1.461913e-5)
    CustomJoint patellofemoral_r: socket_parent_frame=femur_r_offset socket_child_frame=patella_r_offset
      Coordinate knee_angle_r_beta: default_value=0 range=(-99999.9 99999.9) clamped=false
      PhysicalOffsetFrame femur_r_offset: socket_parent=/bodyset/femur_r
          translation=(-0.008552286 -0.431272 -0.002907143)
      PhysicalOffsetFrame patella_r_offset: socket_parent=/bodyset/patella_r translation=(0 0 0)
      SpatialTransform: axes_held_at_zero=(rotation2 rotation3)
        TransformAxis rotation1: coordinates=knee_angle_r_beta axis=(0 0 1)
          SimmSpline: x=(0 0.174533 0.349066 0.523599 0.698132 0.872665 1.0472 1.22173 1.39626 1.5708 1.74533 1.91986 2.0944)
              y=(0.00113686 -0.00629212 -0.105582 -0.253683 -0.414245 -0.579047 -0.747244 -0.91799 -1.09044 -1.26379 -1.43763 -1.61186 -1.78634)
        TransformAxis translation1: coordinates=knee_angle_r_beta axis=(1 0 0)
          MultiplierFunction: scale=1.057143
            SimmSpline: x=(0 0.174533 0.349066 0.523599 0.698132 0.872665 1.0472 1.22173 1.39626 1.5708 1.74533 1.91986 2.0944)
                y=(0.0524 0.0488 0.0437 0.0371 0.0296 0.0216 0.0136 0.0057 -0.0019 -0.0088 -0.0148 -0.0196 -0.0227)
        TransformAxis translation2: coordinates=knee_angle_r_beta axis=(0 1 0)
          MultiplierFunction: scale=1.057143
            SimmSpline: x=(0 0.174533 0.349066 0.523599 0.698132 0.872665 1.0472 1.22173 1.39626 1.5708 1.74533 1.91986 2.0944)
                y=(-0.0108 -0.019 -0.0263 -0.0322 -0.0367 -0.0395 -0.0408 -0.0404 -0.0384 -0.0349 -0.0301 -0.0245 -0.0187)
        TransformAxis translation3: axis=(0 0 1) MultiplierFunction(scale=1.057143, Constant(value=0.00275))
    PinJoint ankle_r: socket_parent_frame=tibia_r_offset socket_child_frame=talus_r_offset
      Coordinate ankle_angle_r: default_value=0 range=(-0.8726646 0.8726646) clamped=true
      PhysicalOffsetFrame tibia_r_offset: socket_parent=/bodyset/tibia_r translation=(-0.01057143 -0.4228571 0)
          orientation=(0.175895 -0.105208 0.0186622)
      PhysicalOffsetFrame talus_r_offset: socket_parent=/bodyset/talus_r translation=(0 0 0)
          orientation=(0.175895 -0.105208 0.0186622)
    PinJoint subtalar_r: socket_parent_frame=talus_r_offset socket_child_frame=calcn_r_offset
      Coordinate subtalar_angle_r: default_value=0 range=(-0.6108652 0.6108652) clamped=true locked=true
      PhysicalOffsetFrame talus_r_offset: socket_parent=/bodyset/talus_r
          translation=(-0.05155686 -0.04434714 0.008372571) orientation=(-1.76819 0.906223 1.8196)
      PhysicalOffsetFrame calcn_r_offset: socket_parent=/bodyset/calcn_r translation=(0 0 0)
          orientation=(-1.76819 0.906223 1.8196)
    PinJoint mtp_r: socket_parent_frame=calcn_r_offset socket_child_frame=toes_r_offset
      Coordinate mtp_angle_r: default_value=0 range=(-0.7853982 0.5235988) clamped=true locked=true
      PhysicalOffsetFrame calcn_r_offset: socket_parent=/bodyset/calcn_r
          translation=(0.1890171 -0.002114286 0.001141714) orientation=(-3.14159 0.619901 0)
      PhysicalOffsetFrame toes_r_offset: socket_parent=/bodyset/toes_r translation=(0 0 0)
          orientation=(-3.14159 0.619901 0)
    CustomJoint hip_l: socket_parent_frame=pelvis_offset socket_child_frame=femur_l_offset
      Coordinate hip_flexion_l: default_value=0 range=(-0.5235988 2.094395) clamped=true
      Coordinate hip_adduction_l: default_value=0 range=(-0.8726646 0.5235988) clamped=true
      Coordinate hip_rotation_l: default_value=0 range=(-0.6981317 0.6981317) clamped=true
      PhysicalOffsetFrame pelvis_offset: socket_parent=/bodyset/pelvis
          translation=(-0.05949177 -0.08297514 -0.08167486)
      PhysicalOffsetFrame femur_l_offset: socket_parent=/bodyset/femur_l translation=(0 0 0)
      SpatialTransform: axes_held_at_zero=(translation1 translation2 translation3)
        TransformAxis rotation1: coordinates=hip_flexion_l axis=(0 0 1) LinearFunction(coefficients=1 0)
        TransformAxis rotation2: coordinates=hip_adduction_l axis=(1 0 0) LinearFunction(coefficients=-1 0)
        TransformAxis rotation3: coordinates=hip_rotation_l axis=(0 1 0) LinearFunction(coefficients=-1 0)
    CustomJoint walker_knee_l: socket_parent_frame=femur_l_offset socket_child_frame=tibia_l_offset
      Coordinate knee_angle_l: default_value=0 range=(0 2.443461) clamped=true
      PhysicalOffsetFrame femur_l_offset: socket_parent=/bodyset/femur_l translation=(-0.004757143 -0.4330057 0.00185)
          orientation=(1.64157 -1.44618 1.5708)
      PhysicalOffsetFrame tibia_l_offset: socket_parent=/bodyset/tibia_l
          translation=(-0.008551799 -0.003736789 0.001569582) orientation=(1.64157 -1.44618 1.5708)
      SpatialTransform:
        TransformAxis rotation1: coordinates=knee_angle_l axis=(-1 0 0) LinearFunction(coefficients=1 0)
        TransformAxis rotation2: coordinates=knee_angle_l axis=(0 0 1)
          PolynomialFunction: coefficients=(0.01083209 -0.02521833 -0.03284781 0.07910001 -1.473252e-8)
        TransformAxis rotation3: coordinates=knee_angle_l axis=(0 1 0)
          PolynomialFunction: coefficients=(-0.02516576 0.1694801 -0.3694993 4.430358e-8)
        TransformAxis translation1: coordinates=knee_angle_l axis=(1 0 0)
          MultiplierFunction: scale=1.057143
            PolynomialFunction: coefficients=(0.0001590448 -0.00101515 0.001817511 2.641427e-5 -7.746564e-7)
        TransformAxis translation2: coordinates=knee_angle_l axis=(0 1 0)
          MultiplierFunction: scale=1.057143
            PolynomialFunction: coefficients=(-0.0005796878 0.005079766 -0.01144238 0.003936909 -2.51635e-5)
        TransformAxis translation3: coordinates=knee_angle_l axis=(0 0 1)
          MultiplierFunction: scale=1.057143
            PolynomialFunction: coefficients=(-0.001208087 0.004453611 -0.0006116494 -0.00626543 1.461913e-5)
    CustomJoint patellofemoral_l: socket_parent_frame=femur_l_offset socket_child_frame=patella_l_offset
      Coordinate knee_angle_l_beta: default_value=0 range=(-99999.9 99999.9) clamped=false
      PhysicalOffsetFrame femur_l_offset: socket_parent=/bodyset/femur_l
          translation=(-0.008552286 -0.431272 0.002907143)
      PhysicalOffsetFrame patella_l_offset: socket_parent=/bodyset/patella_l translation=(0 0 0)
      SpatialTransform: axes_held_at_zero=(rotation2 rotation3)
        TransformAxis rotation1: coordinates=knee_angle_l_beta axis=(0 0 1)
          SimmSpline: x=(0 0.174533 0.349066 0.523599 0.698132 0.872665 1.0472 1.22173 1.39626 1.5708 1.74533 1.91986 2.0944)
              y=(0.00113686 -0.00629212 -0.105582 -0.253683 -0.414245 -0.579047 -0.747244 -0.91799 -1.09044 -1.26379 -1.43763 -1.61186 -1.78634)
        TransformAxis translation1: coordinates=knee_angle_l_beta axis=(1 0 0)
          MultiplierFunction: scale=1.057143
            SimmSpline: x=(0 0.174533 0.349066 0.523599 0.698132 0.872665 1.0472 1.22173 1.39626 1.5708 1.74533 1.91986 2.0944)
                y=(0.0524 0.0488 0.0437 0.0371 0.0296 0.0216 0.0136 0.0057 -0.0019 -0.0088 -0.0148 -0.0196 -0.0227)
        TransformAxis translation2: coordinates=knee_angle_l_beta axis=(0 1 0)
          MultiplierFunction: scale=1.057143
            SimmSpline: x=(0 0.174533 0.349066 0.523599 0.698132 0.872665 1.0472 1.22173 1.39626 1.5708 1.74533 1.91986 2.0944)
                y=(-0.0108 -0.019 -0.0263 -0.0322 -0.0367 -0.0395 -0.0408 -0.0404 -0.0384 -0.0349 -0.0301 -0.0245 -0.0187)
        TransformAxis translation3: axis=(0 0 1) MultiplierFunction(scale=1.057143, Constant(value=-0.00275))
    PinJoint ankle_l: socket_parent_frame=tibia_l_offset socket_child_frame=talus_l_offset
      Coordinate ankle_angle_l: default_value=0 range=(-0.8726646 0.8726646) clamped=true
      PhysicalOffsetFrame tibia_l_offset: socket_parent=/bodyset/tibia_l translation=(-0.01057143 -0.4228571 0)
          orientation=(-0.175895 0.105208 0.0186622)
      PhysicalOffsetFrame talus_l_offset: socket_parent=/bodyset/talus_l translation=(0 0 0)
          orientation=(-0.175895 0.105208 0.0186622)
    PinJoint subtalar_l: socket_parent_frame=talus_l_offset socket_child_frame=calcn_l_offset
      Coordinate subtalar_angle_l: default_value=0 range=(-0.6108652 0.6108652) clamped=true locked=true
      PhysicalOffsetFrame talus_l_offset: socket_parent=/bodyset/talus_l
          translation=(-0.05155686 -0.04434714 -0.008372571) orientation=(1.76819 -0.906223 1.8196)
      PhysicalOffsetFrame calcn_l_offset: socket_parent=/bodyset/calcn_l translation=(0 0 0)
          orientation=(1.76819 -0.906223 1.8196)
    PinJoint mtp_l: socket_parent_frame=calcn_l_offset socket_child_frame=toes_l_offset
      Coordinate mtp_angle_l: default_value=0 range=(-0.7853982 0.5235988) clamped=true locked=true
      PhysicalOffsetFrame calcn_l_offset: socket_parent=/bodyset/calcn_l
          translation=(0.1890171 -0.002114286 -0.001141714) orientation=(-3.14159 -0.619901 0)
      PhysicalOffsetFrame toes_l_offset: socket_parent=/bodyset/toes_l translation=(0 0 0)
          orientation=(-3.14159 -0.619901 0)
    CustomJoint back: socket_parent_frame=pelvis_offset socket_child_frame=torso_offset
      Coordinate lumbar_extension: default_value=0 range=(-1.570796 1.570796) clamped=true
      Coordinate lumbar_bending: default_value=0 range=(-1.570796 1.570796) clamped=true
      Coordinate lumbar_rotation: default_value=0 range=(-1.570796 1.570796) clamped=true
      PhysicalOffsetFrame pelvis_offset: socket_parent=/bodyset/pelvis translation=(-0.1064543 0.08615714 0)
      PhysicalOffsetFrame torso_offset: socket_parent=/bodyset/torso translation=(0 0 0)
      SpatialTransform: axes_held_at_zero=(translation1 translation2 translation3)
        TransformAxis rotation1: coordinates=lumbar_extension axis=(0 0 1) LinearFunction(coefficients=1 0)
        TransformAxis rotation2: coordinates=lumbar_bending axis=(1 0 0) LinearFunction(coefficients=1 0)
        TransformAxis rotation3: coordinates=lumbar_rotation axis=(0 1 0) LinearFunction(coefficients=1 0)
    CustomJoint acromial_r: socket_parent_frame=torso_offset socket_child_frame=humerus_r_offset
      Coordinate arm_flex_r: default_value=0 range=(-1.570796 1.570796) clamped=true
      Coordinate arm_add_r: default_value=0 range=(-2.094395 1.570796) clamped=true
      Coordinate arm_rot_r: default_value=0 range=(-1.570796 1.570796) clamped=true
      PhysicalOffsetFrame torso_offset: socket_parent=/bodyset/torso translation=(0.003335286 0.3927286 0.1797143)
      PhysicalOffsetFrame humerus_r_offset: socket_parent=/bodyset/humerus_r translation=(0 0 0)
      SpatialTransform: axes_held_at_zero=(translation1 translation2 translation3)
        TransformAxis rotation1: coordinates=arm_flex_r axis=(0 0 1) LinearFunction(coefficients=1 0)
        TransformAxis rotation2: coordinates=arm_add_r axis=(1 0 0) LinearFunction(coefficients=1 0)
        TransformAxis rotation3: coordinates=arm_rot_r axis=(0 1 0) LinearFunction(coefficients=1 0)
    PinJoint elbow_r: socket_parent_frame=humerus_r_offset socket_child_frame=ulna_r_offset
      Coordinate elbow_flex_r: default_value=0 range=(0 2.618) clamped=true
      PhysicalOffsetFrame humerus_r_offset: socket_parent=/bodyset/humerus_r
          translation=(0.01389509 -0.3026315 -0.01014329) orientation=(-0.0228627 0.228018 0.0051689)
      PhysicalOffsetFrame ulna_r_offset: socket_parent=/bodyset/ulna_r translation=(0 0 0)
          orientation=(-0.0228627 0.228018 0.0051689)
    PinJoint radioulnar_r: socket_parent_frame=ulna_r_offset socket_child_frame=radius_r_offset
      Coordinate pro_sup_r: default_value=0 range=(0 2.09) clamped=true
      PhysicalOffsetFrame ulna_r_offset: socket_parent=/bodyset/ulna_r translation=(-0.0071114 -0.01375026 0.02757346)
          orientation=(-1.56884 0.056428 1.53614)
      PhysicalOffsetFrame radius_r_offset: socket_parent=/bodyset/radius_r translation=(0 0 0)
          orientation=(-1.56884 0.056428 1.53614)
    UniversalJoint radius_hand_r: socket_parent_frame=radius_r_offset socket_child_frame=hand_r_offset
      Coordinate wrist_flex_r: default_value=0 range=(-1.22173 1.22173) clamped=true locked=true
      Coordinate wrist_dev_r: default_value=0 range=(-0.4363323 0.6108652) clamped=true locked=true
      PhysicalOffsetFrame radius_r_offset: socket_parent=/bodyset/radius_r
          translation=(-0.009299686 -0.2493176 0.01438771) orientation=(-1.5708 0 -1.5708)
      PhysicalOffsetFrame hand_r_offset: socket_parent=/bodyset/hand_r translation=(0 0 0)
          orientation=(-1.5708 0 -1.5708)
    CustomJoint acromial_l: socket_parent_frame=torso_offset socket_child_frame=humerus_l_offset
      Coordinate arm_flex_l: default_value=0 range=(-1.570796 1.570796) clamped=true
      Coordinate arm_add_l: default_value=0 range=(-2.094395 1.570796) clamped=true
      Coordinate arm_rot_l: default_value=0 range=(-1.570796 1.570796) clamped=true
      PhysicalOffsetFrame torso_offset: socket_parent=/bodyset/torso translation=(0.003335286 0.3927286 -0.1797143)
      PhysicalOffsetFrame humerus_l_offset: socket_parent=/bodyset/humerus_l translation=(0 0 0)
      SpatialTransform: axes_held_at_zero=(translation1 translation2 translation3)
        TransformAxis rotation1: coordinates=arm_flex_l axis=(0 0 1) LinearFunction(coefficients=1 0)
        TransformAxis rotation2: coordinates=arm_add_l axis=(-1 0 0) LinearFunction(coefficients=1 0)
        TransformAxis rotation3: coordinates=arm_rot_l axis=(0 -1 0) LinearFunction(coefficients=1 0)
    PinJoint elbow_l: socket_parent_frame=humerus_l_offset socket_child_frame=ulna_l_offset
      Coordinate elbow_flex_l: default_value=0 range=(0 2.618) clamped=true
      PhysicalOffsetFrame humerus_l_offset: socket_parent=/bodyset/humerus_l
          translation=(0.01389509 -0.3026315 0.01014329) orientation=(0.0228627 -0.228018 0.0051689)
      PhysicalOffsetFrame ulna_l_offset: socket_parent=/bodyset/ulna_l translation=(0 0 0)
          orientation=(0.0228627 -0.228018 0.0051689)
    PinJoint radioulnar_l: socket_parent_frame=ulna_l_offset socket_child_frame=radius_l_offset
      Coordinate pro_sup_l: default_value=0 range=(0 2.09) clamped=true
      PhysicalOffsetFrame ulna_l_offset: socket_parent=/bodyset/ulna_l translation=(-0.0071114 -0.01375026 -0.02757346)
          orientation=(1.56884 -0.056428 1.53614)
      PhysicalOffsetFrame radius_l_offset: socket_parent=/bodyset/radius_l translation=(0 0 0)
          orientation=(1.56884 -0.056428 1.53614)
    UniversalJoint radius_hand_l: socket_parent_frame=radius_l_offset socket_child_frame=hand_l_offset
      Coordinate wrist_flex_l: default_value=0 range=(-1.22173 1.22173) clamped=true locked=true
      Coordinate wrist_dev_l: default_value=0 range=(-0.4363323 0.6108652) clamped=true locked=true
      PhysicalOffsetFrame radius_l_offset: socket_parent=/bodyset/radius_l
          translation=(-0.009299686 -0.2493176 -0.01438771) orientation=(1.5708 0 1.5708)
      PhysicalOffsetFrame hand_l_offset: socket_parent=/bodyset/hand_l translation=(0 0 0)
          orientation=(1.5708 0 1.5708)
  ConstraintSet:
    CoordinateCouplerConstraint patellofemoral_knee_angle_r_con: independent_coordinate_names=knee_angle_r
        dependent_coordinate_name=knee_angle_r_beta scale_factor=1
        coupled_coordinates_function=LinearFunction(coefficients=1 0)
    CoordinateCouplerConstraint patellofemoral_knee_angle_l_con: independent_coordinate_names=knee_angle_l
        dependent_coordinate_name=knee_angle_l_beta scale_factor=1
        coupled_coordinates_function=LinearFunction(coefficients=1 0)
  ForceSet:
    CoordinateActuator [values shared by the 39 below unless stated]: min_control=-1000000 max_control=1000000
        optimal_force=1
    CoordinateActuator pelvis_tilt_moment: coordinate=pelvis_tilt
    CoordinateActuator pelvis_list_moment: coordinate=pelvis_list
    CoordinateActuator pelvis_rotation_moment: coordinate=pelvis_rotation
    CoordinateActuator pelvis_tx_force: coordinate=pelvis_tx
    CoordinateActuator pelvis_ty_force: coordinate=pelvis_ty
    CoordinateActuator pelvis_tz_force: coordinate=pelvis_tz
    CoordinateActuator hip_flexion_r_moment: coordinate=hip_flexion_r
    CoordinateActuator hip_adduction_r_moment: coordinate=hip_adduction_r
    CoordinateActuator hip_rotation_r_moment: coordinate=hip_rotation_r
    CoordinateActuator knee_angle_r_moment: coordinate=knee_angle_r
    CoordinateActuator knee_angle_r_beta_force: coordinate=knee_angle_r_beta
    CoordinateActuator ankle_angle_r_moment: coordinate=ankle_angle_r
    CoordinateActuator subtalar_angle_r_moment: coordinate=subtalar_angle_r
    CoordinateActuator mtp_angle_r_moment: coordinate=mtp_angle_r
    CoordinateActuator hip_flexion_l_moment: coordinate=hip_flexion_l
    CoordinateActuator hip_adduction_l_moment: coordinate=hip_adduction_l
    CoordinateActuator hip_rotation_l_moment: coordinate=hip_rotation_l
    CoordinateActuator knee_angle_l_moment: coordinate=knee_angle_l
    CoordinateActuator knee_angle_l_beta_force: coordinate=knee_angle_l_beta
    CoordinateActuator ankle_angle_l_moment: coordinate=ankle_angle_l
    CoordinateActuator subtalar_angle_l_moment: coordinate=subtalar_angle_l
    CoordinateActuator mtp_angle_l_moment: coordinate=mtp_angle_l
    CoordinateActuator lumbar_extension_moment: coordinate=lumbar_extension
    CoordinateActuator lumbar_bending_moment: coordinate=lumbar_bending
    CoordinateActuator lumbar_rotation_moment: coordinate=lumbar_rotation
    CoordinateActuator arm_flex_r_moment: coordinate=arm_flex_r
    CoordinateActuator arm_add_r_moment: coordinate=arm_add_r
    CoordinateActuator arm_rot_r_moment: coordinate=arm_rot_r
    CoordinateActuator elbow_flex_r_moment: coordinate=elbow_flex_r
    CoordinateActuator pro_sup_r_moment: coordinate=pro_sup_r
    CoordinateActuator wrist_flex_r_moment: coordinate=wrist_flex_r
    CoordinateActuator wrist_dev_r_moment: coordinate=wrist_dev_r
    CoordinateActuator arm_flex_l_moment: coordinate=arm_flex_l
    CoordinateActuator arm_add_l_moment: coordinate=arm_add_l
    CoordinateActuator arm_rot_l_moment: coordinate=arm_rot_l
    CoordinateActuator elbow_flex_l_moment: coordinate=elbow_flex_l
    CoordinateActuator pro_sup_l_moment: coordinate=pro_sup_l
    CoordinateActuator wrist_flex_l_moment: coordinate=wrist_flex_l
    CoordinateActuator wrist_dev_l_moment: coordinate=wrist_dev_l
  MarkerSet:
    Marker RACR: torso (-0.003171429 0.4492857 0.1374286)
    Marker LACR: torso (-0.003171429 0.4492857 -0.1374286)
    Marker C7: torso (-0.08985714 0.4598571 0.001748789)
    Marker CLAV: torso (0.04228571 0.4017143 0.01797143)
    Marker RASH: torso (0.05285714 0.3927286 0.1797143)
    Marker RPSH: torso (-0.05285714 0.3927286 0.1797143)
    Marker LASH: torso (0.05285714 0.3927286 -0.1797143)
    Marker LPSH: torso (-0.06131429 0.3927286 -0.1797143)
    Marker RSJC: humerus_r (0 0 0)
    Marker RUA1: humerus_r (0 -0.05285714 0.02114286)
    Marker RUA2: humerus_r (0 -0.2114286 0.02114286)
    Marker RUA3: humerus_r (0.03171429 -0.1374286 0.02114286)
    Marker RLEL: humerus_r (0.01585714 -0.296 0.04228571)
    Marker RMEL: humerus_r (0.002378571 -0.3023429 -0.04862857)
    Marker RFAsuperior: ulna_r (0.004867646 -0.08463264 0.04790929)
    Marker RFAradius: radius_r (0.0005285714 -0.2378571 0.05285714)
    Marker RFAulna: radius_r (-0.02325714 -0.2378571 -0.02325714)
    Marker LSJC: humerus_l (0 0 0)
    Marker LUA1: humerus_l (0 -0.05285714 -0.02114286)
    Marker LUA2: humerus_l (0 -0.2114286 -0.02114286)
    Marker LUA3: humerus_l (0.03171429 -0.1374286 -0.02114286)
    Marker LLEL: humerus_l (0.01585714 -0.296 -0.04228571)
    Marker LMEL: humerus_l (0.002378624 -0.3023429 0.04862857)
    Marker LFAsuperior: ulna_l (0.004867646 -0.08463264 -0.04790929)
    Marker LFAradius: radius_l (0.0005285714 -0.2378571 -0.05285714)
    Marker LFAulna: radius_l (-0.02325714 -0.2378571 0.02325714)
    Marker RASI: pelvis (0.01007507 0.01911483 0.1358048)
    Marker LASI: pelvis (0.01007507 0.01911483 -0.1358048)
    Marker RPSI: pelvis (-0.1638571 0.037 0.04757143)
    Marker LPSI: pelvis (-0.1638571 0.037 -0.04757143)
    Marker LHJC: femur_l (0 0 0)
    Marker RHJC: femur_r (0 0 0)
    Marker RTH1: femur_r (0.01902857 -0.1585714 0.06765714)
    Marker RTH2: femur_r (0.08457143 -0.2431429 0.004968571)
    Marker RTH3: femur_r (0.01057143 -0.3171429 0.06342857)
    Marker RLFC: femur_r (0 -0.4270857 0.05285714)
    Marker RMFC: femur_r (0 -0.4270857 -0.05285714)
    Marker RKJC: tibia_r (0.001829914 -0.002525514 -0.008934971)
    Marker RTB1: tibia_r (-0.001756739 -0.1654302 0.05205308)
    Marker RTB2: tibia_r (0.03907655 -0.243256 -0.004140818)
    Marker RTB3: tibia_r (0.01202955 -0.3121066 0.05851719)
    Marker RLMAL: tibia_r (-0.005285714 -0.4110171 0.05602857)
    Marker RMMAL: tibia_r (0.006342857 -0.4110171 -0.04017143)
    Marker RAJC: talus_r (0 0 0)
    Marker RCAL: calcn_r (-0.02642857 0.02114286 -0.005285714)
    Marker RTOE: calcn_r (0.2167143 0.0314297 -0.03171429)
    Marker RMT5: calcn_r (0.1532857 0.02633343 0.06237143)
    Marker LTH1: femur_l (0.01902857 -0.1585714 -0.06765714)
    Marker LTH2: femur_l (0.08457143 -0.2431429 -0.004968571)
    Marker LTH3: femur_l (0.01057143 -0.3171429 -0.06342857)
    Marker LLFC: femur_l (0 -0.4270857 -0.05285714)
    Marker LMFC: femur_l (0 -0.4270857 0.05285714)
    Marker LKJC: tibia_l (0.001829914 -0.002525514 0.008934971)
    Marker LTB1: tibia_l (-0.001756739 -0.1654302 -0.05205308)
    Marker LTB2: tibia_l (0.03907655 -0.243256 0.004140818)
    Marker LTB3: tibia_l (0.01202955 -0.3121066 -0.05851719)
    Marker LLMAL: tibia_l (-0.005285714 -0.4110171 -0.05602857)
    Marker LMMAL: tibia_l (0.006342857 -0.4110171 0.04017143)
    Marker LAJC: talus_l (0 0 0)
    Marker LCAL: calcn_l (-0.02642857 0.02114286 0.005285714)
    Marker LTOE: calcn_l (0.2167143 0.03142886 0.03171429)
    Marker LMT5: calcn_l (0.1532857 0.02633237 -0.06237143)
    Marker REJC: ulna_r (0 0 0)
    Marker LEJC: ulna_l (0 0 0)
    Marker R_tibial_plateau: tibia_r (-0.008551799 -0.01797143 -0.001569582)
    Marker L_tibial_plateau: tibia_l (-0.008551799 -0.01797143 0.001569582)
    Marker L_HIP: pelvis (-0.05949177 -0.08297514 -0.08167486)
    Marker R_HIP: pelvis (-0.05949177 -0.08297514 0.08167486)
    Marker L_SHOULDER: torso (0.003335286 0.3927286 -0.1797143)
    Marker R_SHOULDER: torso (0.003335286 0.3927286 0.1797143)
    Marker L_KNEE: tibia_l (0 0 0)
    Marker R_KNEE: tibia_r (0 0 0)
    Marker L_ANKLE: talus_l (0 0 0)
    Marker R_ANKLE: talus_r (0 0 0)
    Marker L_TOE: toes_l (0 0 0)
    Marker R_TOE: toes_r (0 0 0)
    Marker L_ELBOW: ulna_l (0 0 0)
    Marker R_ELBOW: ulna_r (0 0 0)
    Marker L_WRIST: hand_l (0 0 0)
    Marker R_WRIST: hand_r (0 0 0)
